# NUFEB simulation

units si
atom_style	bio
atom_modify	map array sort 1000 5.0e-7
boundary	pp pp ff
newton		off
processors 2 2 1

comm_modify	vel yes
read_data_bio atom.in

##############Define initial particle distribution##############

lattice sc 5e-6 origin 0 0 0
region reg block 0 60 0 60 0 1

create_atoms 1 random 10 3124 reg
create_atoms 2 random 10 1321 reg
create_atoms 3 random 10 52342 reg
create_atoms 4 random 1 13212 reg

set type 1 density 32
set type 1 diameter 4.5e-6
set type 1 mass 7.18e-16
bio/set type 1 biomass 1.52e-15

set type 2 density 32
set type 2 diameter 4.5e-6
set type 2 mass 7.18e-16
bio/set type 2 biomass 1.52e-15

set type 3 density 32
set type 3 diameter 4.5e-6
set type 3 mass 7.18e-16
bio/set type 3 biomass 1.52e-15

set type 4 density 32
set type 4 diameter 4.5e-6
set type 4 mass 7.18e-16
bio/set type 4 biomass 1.52e-15

group ANA type 1
group AOB type 2
group NOB type 3
group DEAD type 4

neighbor        5e-7 bin
neigh_modify    delay 0 one 5000

##############Define DEM Variables&Commands##############

pair_style  gran/hooke/history 1e-4 NULL 1e-4 NULL 0 1
pair_coeff  * *

timestep 1e-3

fix 1 all nve/limit 1e-8
fix fv all viscous 1e-8

fix zw all wall/gran hooke/history 1e-4 NULL 1e-4 NULL 0 1 zplane 0 3e-04

variable kanc equal 5e+8

fix zwa all walladh v_kanc zplane  0.0 3e-04

##############Define IBm Variables##############

#variables used in fix eps_extract
variable EPSdens equal 30

#variables used in fix division
variable divDia equal 5e-6

#variables used in fix kinetics
variable diffT equal 1e-4
variable tol equal 1e-6
variable etaHET equal 0
variable layer equal 5e-5

#variables used in fix death
variable deadDia equal 1e-6

##############Define IBm Commands##############

fix k1 all kinetics 1 30 30 30 v_diffT v_layer niter 2000
fix kgm all kinetics/growth/monod v_EPSdens v_etaHET
fix g1 all kinetics/diffusion v_tol pp pp nd kg bulk 2.31e-7 1.25e-3 0.1
#fix g1 all kinetics/diffusion v_tol pp pp nd kg
fix d1 all divide 1 v_EPSdens v_divDia 41341 demflag 0
fix d2 all death 1 v_deadDia demflag 0

##############Define IBm Computes##############

compute myNtypes all ntypes
compute myMass all biomass

##############Simulation Output##############

thermo_style    custom step cpu atoms c_myNtypes[2] c_myNtypes[3] c_myNtypes[4] c_myNtypes[5] c_myMass[2] c_myMass[3] c_myMass[4]
dump du0 all bio 18006 biomass ntypes bulk
dump du2 all grid 90030 grid_%_*.vti con
dump du3 all custom/vtk 90030 snapshot_*.vtu id type diameter x y z
thermo 3001
thermo_modify   lost ignore

##############Define Bio-loop and DEM-subloop##############

run 43200 pre no post no every 1 &
"fix_modify k1 demflag 1" &
"fix_modify d2 demflag 1" &
"fix_modify d1 demflag 1" &
"timestep 1e-3" &
"run 3000 pre no post no" &
"timestep 3600" &
"fix_modify k1 demflag 0" &
"fix_modify d2 demflag 0" &
"fix_modify d1 demflag 0" &
